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/batch
! ANSYS input file written by Workbench version 2019 R3
/solu
antype,0,rest,3,7,continue                   ! static analysis restart
nldiag,cont,iter           ! print out contact info each equilibrium iteration
*get,_PCGITER,active,,solu,cgiter
/post1
fini
